OpenVSP model (file version 5), 1 components.
Geometry view with OpenVSP parameter names; values to 6 digits, angles in degrees, lengths in the model's unit.
Overall bounding box: X_Min=-1.49034e-06 X_Len=9.00674 Y_Min=0 Y_Len=14.0893 Z_Min=-0.29506 Z_Len=0.610076

Wing "TestWing"
  location (X Y Z) 0 0 0, rotation 0 0 0
  bounding box size 9.00674 14.0893 0.610076
  totals: TotalSpan=14 TotalProjectedSpan=14 TotalChord=3.25 TotalArea=45.5 TotalAR=4.30769
  root: chord 5, twist 0, CST airfoil ContLERad=0 DeltaX=-3.643e-09 DeltaY=-7.60073e-06 LowDegree=5 ThickChord=0.120619 UpDegree=5 Au=[0.126167 0.141591 0.155562 0.21405 0.175302 0.210783] Al=[-0.126422 -0.13218 -0.201929 -0.14139 -0.0766774 0.0505089]
  sections:
    n  Span  Root_Chord  Tip_Chord  Area  Sweep  Sweep_Location  Dihedral  Twist  Twist_Location  tip airfoil
    1  14    5           1.5        45.5  28.2   0               0         0      0.25            CST airfoil ContLERad=0 DeltaX=-3.643e-09 DeltaY=-7.60073e-06 LowDegree=5 ThickChord=0.120634 UpDegree=5 Au=[0.127381 0.132644 0.176202 0.193482 0.183778 0.210251] Al=[-0.125416 -0.141596 -0.181025 -0.161848 -0.0681956 0.0498136]
